// SBML level 3 version 2

model biocrnpyler_385758()
  // model units - substance: mole, time: second, volume: litre, area: square_metre, length: metre, extent: mole

  // Compartments:
  compartment default = 1e-6;

  // Species:
  species dna_part_P_SrpR_forward_part_P_BetI_forward_part_UTR1_forward_part_PhlF_forward_part_t16_forward_ in default = 0;
  species dna_part_P_Tac_forward_part_P_Tet_forward_part_UTR1_forward_part_SrpR_forward_part_t16_forward_ in default = 0;
  species dna_part_P_HlyIIR_forward_part_P_AmeR_forward_part_UTR1_forward_part_BetI_forward_part_t16_forward_ in default = 0;
  species dna_part_P_Tet_forward_part_UTR1_forward_part_AmeR_forward_part_t16_forward_ in default = 0;
  species dna_part_P_Tac_forward_part_UTR1_forward_part_HlyIIR_forward_part_t16_forward_ in default = 0;
  species dna_part_P_BAD_forward_part_UTR1_forward_part_AmtR_forward_part_t16_forward_ in default = 0;
  species dna_part_P_PhlF_forward_part_P_Inv2_forward_part_UTR1_forward_part_YFP_forward_part_t16_forward_ in default = 0;
  species dna_part_P_AmtR_forward_part_UTR1_forward_part_Inv1_forward_part_t16_forward_ in default = 0;
  species dna_part_P_Inv1_forward_part_UTR1_forward_part_Inv2_forward_part_t16_forward_ in default = 0;
  species protein_IPTG_input in default = 0;
  species protein_LacI_input in default = 0;
  species complex_protein_IPTG_input_2x_protein_LacI_input_2x_ in default = 0;
  species protein_aTc_input in default = 0;
  species protein_TetR_input in default = 0;
  species complex_protein_TetR_input_2x_protein_aTc_input_2x_ in default = 0;
  species protein_Ara_input in default = 0;
  species protein_AraC_input in default = 0;
  species complex_protein_AraC_input_2x_protein_Ara_input_2x_ in default = 0;
  species ordered_polymer_complex_part_P_SrpR_protein_SrpR_degtagged_4x_forward__part_P_BetI_forward_part_UTR1_forward_part_PhlF_forward_part_t16_forward_ in default = 0;
  species rna_part_UTR1_forward_part_PhlF_forward_part_t16_forward_ in default = 0;
  species protein_BetI_degtagged in default = 0;
  species ordered_polymer_complex_part_P_SrpR_protein_SrpR_degtagged_4x_forward__complex_part_P_BetI_protein_BetI_degtagged_4x_forward__part_UTR1_forward_part_PhlF_forward_part_t16_forward_ in default = 0;
  species ordered_polymer_part_P_SrpR_forward_complex_part_P_BetI_protein_BetI_degtagged_4x_forward__part_UTR1_forward_part_PhlF_forward_part_t16_forward_ in default = 0;
  species rna_part_P_BetI_forward_part_UTR1_forward_part_PhlF_forward_part_t16_forward_ in default = 0;
  species protein_SrpR_degtagged in default = 0;
  species ordered_polymer_complex_part_P_Tac_protein_LacI_input_4x_forward__part_P_Tet_forward_part_UTR1_forward_part_SrpR_forward_part_t16_forward_ in default = 0;
  species rna_part_UTR1_forward_part_SrpR_forward_part_t16_forward_ in default = 0;
  species ordered_polymer_complex_part_P_Tac_protein_LacI_input_4x_forward__complex_part_P_Tet_protein_TetR_input_4x_forward__part_UTR1_forward_part_SrpR_forward_part_t16_forward_ in default = 0;
  species ordered_polymer_part_P_Tac_forward_complex_part_P_Tet_protein_TetR_input_4x_forward__part_UTR1_forward_part_SrpR_forward_part_t16_forward_ in default = 0;
  species rna_part_P_Tet_forward_part_UTR1_forward_part_SrpR_forward_part_t16_forward_ in default = 0;
  species ordered_polymer_complex_part_P_HlyIIR_protein_HlyIIR_degtagged_4x_forward__part_P_AmeR_forward_part_UTR1_forward_part_BetI_forward_part_t16_forward_ in default = 0;
  species rna_part_UTR1_forward_part_BetI_forward_part_t16_forward_ in default = 0;
  species protein_AmeR_degtagged in default = 0;
  species ordered_polymer_complex_part_P_HlyIIR_protein_HlyIIR_degtagged_4x_forward__complex_part_P_AmeR_protein_AmeR_degtagged_4x_forward__part_UTR1_forward_part_BetI_forward_part_t16_forward_ in default = 0;
  species ordered_polymer_part_P_HlyIIR_forward_complex_part_P_AmeR_protein_AmeR_degtagged_4x_forward__part_UTR1_forward_part_BetI_forward_part_t16_forward_ in default = 0;
  species rna_part_P_AmeR_forward_part_UTR1_forward_part_BetI_forward_part_t16_forward_ in default = 0;
  species protein_HlyIIR_degtagged in default = 0;
  species rna_part_UTR1_forward_part_AmeR_forward_part_t16_forward_ in default = 0;
  species ordered_polymer_complex_part_P_Tet_protein_TetR_input_4x_forward__part_UTR1_forward_part_AmeR_forward_part_t16_forward_ in default = 0;
  species rna_part_UTR1_forward_part_HlyIIR_forward_part_t16_forward_ in default = 0;
  species ordered_polymer_complex_part_P_Tac_protein_LacI_input_4x_forward__part_UTR1_forward_part_HlyIIR_forward_part_t16_forward_ in default = 0;
  species ordered_polymer_complex_complex_protein_AraC_input_2x_protein_Ara_input_2x__4x_part_P_BAD_forward__part_UTR1_forward_part_AmtR_forward_part_t16_forward_ in default = 0;
  species rna_part_UTR1_forward_part_AmtR_forward_part_t16_forward_ in default = 0;
  species ordered_polymer_complex_part_P_PhlF_protein_PhlF_degtagged_4x_forward__part_P_Inv2_forward_part_UTR1_forward_part_YFP_forward_part_t16_forward_ in default = 0;
  species rna_part_UTR1_forward_part_YFP_forward_part_t16_forward_ in default = 0;
  species protein_Inv2_degtagged in default = 0;
  species ordered_polymer_complex_part_P_PhlF_protein_PhlF_degtagged_4x_forward__complex_part_P_Inv2_protein_Inv2_degtagged_4x_forward__part_UTR1_forward_part_YFP_forward_part_t16_forward_ in default = 0;
  species ordered_polymer_part_P_PhlF_forward_complex_part_P_Inv2_protein_Inv2_degtagged_4x_forward__part_UTR1_forward_part_YFP_forward_part_t16_forward_ in default = 0;
  species rna_part_P_Inv2_forward_part_UTR1_forward_part_YFP_forward_part_t16_forward_ in default = 0;
  species protein_PhlF_degtagged in default = 0;
  species rna_part_UTR1_forward_part_Inv1_forward_part_t16_forward_ in default = 0;
  species protein_AmtR_degtagged in default = 0;
  species ordered_polymer_complex_part_P_AmtR_protein_AmtR_degtagged_4x_forward__part_UTR1_forward_part_Inv1_forward_part_t16_forward_ in default = 0;
  species rna_part_UTR1_forward_part_Inv2_forward_part_t16_forward_ in default = 0;
  species protein_Inv1_degtagged in default = 0;
  species ordered_polymer_complex_part_P_Inv1_protein_Inv1_degtagged_4x_forward__part_UTR1_forward_part_Inv2_forward_part_t16_forward_ in default = 0;
  species protein_PhlF_degtagged in default = 0;
  species protein_SrpR_degtagged in default = 0;
  species protein_BetI_degtagged in default = 0;
  species protein_AmeR_degtagged in default = 0;
  species protein_HlyIIR_degtagged in default = 0;
  species protein_AmtR_degtagged in default = 0;
  species protein_YFP_degtagged in default = 0;
  species protein_Inv1_degtagged in default = 0;
  species protein_Inv2_degtagged in default = 0;

  // Parameters:
  kb__ = 100;
  ku__ = 10;
  ktx_P_BetI_leak_simple_transcription = 0.05;
  kb__one_step_cooperative_binding = 100;
  ku__one_step_cooperative_binding = 10;
  ktx__simple_transcription = 1e-15;
  ktx_P_SrpR_leak_simple_transcription = 0.05;
  ktx_P_Tet_leak_simple_transcription = 0.05;
  ktx_P_Tac_leak_simple_transcription = 0.05;
  ktx_P_AmeR_leak_simple_transcription = 0.05;
  ktx_P_HlyIIR_leak_simple_transcription = 0.05;
  ktx_P_BAD_protein_AraC_input_2x_protein_Ara_input_2x_simple_transcription = 0.05;
  ktx_P_Inv2_leak_simple_transcription = 0.05;
  ktx_P_PhlF_leak_simple_transcription = 0.05;
  ktx_P_AmtR_leak_simple_transcription = 0.05;
  ktx_P_Inv1_leak_simple_transcription = 0.05;
  ktl__ = 0.05;
  kdil__ = 0.0075;

  // Reactions:
  r0: 2 protein_IPTG_input + 2 protein_LacI_input => complex_protein_IPTG_input_2x_protein_LacI_input_2x_; kb__*protein_IPTG_input^2*protein_LacI_input^2;
  r0rev: complex_protein_IPTG_input_2x_protein_LacI_input_2x_ => 2 protein_IPTG_input + 2 protein_LacI_input; ku__*complex_protein_IPTG_input_2x_protein_LacI_input_2x_;
  r1: 2 protein_aTc_input + 2 protein_TetR_input => complex_protein_TetR_input_2x_protein_aTc_input_2x_; kb__*protein_aTc_input^2*protein_TetR_input^2;
  r1rev: complex_protein_TetR_input_2x_protein_aTc_input_2x_ => 2 protein_aTc_input + 2 protein_TetR_input; ku__*complex_protein_TetR_input_2x_protein_aTc_input_2x_;
  r2: 2 protein_Ara_input + 2 protein_AraC_input => complex_protein_AraC_input_2x_protein_Ara_input_2x_; kb__*protein_Ara_input^2*protein_AraC_input^2;
  r2rev: complex_protein_AraC_input_2x_protein_Ara_input_2x_ => 2 protein_Ara_input + 2 protein_AraC_input; ku__*complex_protein_AraC_input_2x_protein_Ara_input_2x_;
  r3: ordered_polymer_complex_part_P_SrpR_protein_SrpR_degtagged_4x_forward__part_P_BetI_forward_part_UTR1_forward_part_PhlF_forward_part_t16_forward_ => ordered_polymer_complex_part_P_SrpR_protein_SrpR_degtagged_4x_forward__part_P_BetI_forward_part_UTR1_forward_part_PhlF_forward_part_t16_forward_ + rna_part_UTR1_forward_part_PhlF_forward_part_t16_forward_; ktx_P_BetI_leak_simple_transcription*ordered_polymer_complex_part_P_SrpR_protein_SrpR_degtagged_4x_forward__part_P_BetI_forward_part_UTR1_forward_part_PhlF_forward_part_t16_forward_;
  r4: 4 protein_BetI_degtagged + ordered_polymer_complex_part_P_SrpR_protein_SrpR_degtagged_4x_forward__part_P_BetI_forward_part_UTR1_forward_part_PhlF_forward_part_t16_forward_ => ordered_polymer_complex_part_P_SrpR_protein_SrpR_degtagged_4x_forward__complex_part_P_BetI_protein_BetI_degtagged_4x_forward__part_UTR1_forward_part_PhlF_forward_part_t16_forward_; kb__one_step_cooperative_binding*protein_BetI_degtagged^4*ordered_polymer_complex_part_P_SrpR_protein_SrpR_degtagged_4x_forward__part_P_BetI_forward_part_UTR1_forward_part_PhlF_forward_part_t16_forward_;
  r4rev: ordered_polymer_complex_part_P_SrpR_protein_SrpR_degtagged_4x_forward__complex_part_P_BetI_protein_BetI_degtagged_4x_forward__part_UTR1_forward_part_PhlF_forward_part_t16_forward_ => 4 protein_BetI_degtagged + ordered_polymer_complex_part_P_SrpR_protein_SrpR_degtagged_4x_forward__part_P_BetI_forward_part_UTR1_forward_part_PhlF_forward_part_t16_forward_; ku__one_step_cooperative_binding*ordered_polymer_complex_part_P_SrpR_protein_SrpR_degtagged_4x_forward__complex_part_P_BetI_protein_BetI_degtagged_4x_forward__part_UTR1_forward_part_PhlF_forward_part_t16_forward_;
  r5: ordered_polymer_complex_part_P_SrpR_protein_SrpR_degtagged_4x_forward__complex_part_P_BetI_protein_BetI_degtagged_4x_forward__part_UTR1_forward_part_PhlF_forward_part_t16_forward_ => ordered_polymer_complex_part_P_SrpR_protein_SrpR_degtagged_4x_forward__complex_part_P_BetI_protein_BetI_degtagged_4x_forward__part_UTR1_forward_part_PhlF_forward_part_t16_forward_ + rna_part_UTR1_forward_part_PhlF_forward_part_t16_forward_; ktx__simple_transcription*ordered_polymer_complex_part_P_SrpR_protein_SrpR_degtagged_4x_forward__complex_part_P_BetI_protein_BetI_degtagged_4x_forward__part_UTR1_forward_part_PhlF_forward_part_t16_forward_;
  r6: ordered_polymer_part_P_SrpR_forward_complex_part_P_BetI_protein_BetI_degtagged_4x_forward__part_UTR1_forward_part_PhlF_forward_part_t16_forward_ => ordered_polymer_part_P_SrpR_forward_complex_part_P_BetI_protein_BetI_degtagged_4x_forward__part_UTR1_forward_part_PhlF_forward_part_t16_forward_ + rna_part_P_BetI_forward_part_UTR1_forward_part_PhlF_forward_part_t16_forward_; ktx_P_SrpR_leak_simple_transcription*ordered_polymer_part_P_SrpR_forward_complex_part_P_BetI_protein_BetI_degtagged_4x_forward__part_UTR1_forward_part_PhlF_forward_part_t16_forward_;
  r7: 4 protein_SrpR_degtagged + ordered_polymer_part_P_SrpR_forward_complex_part_P_BetI_protein_BetI_degtagged_4x_forward__part_UTR1_forward_part_PhlF_forward_part_t16_forward_ => ordered_polymer_complex_part_P_SrpR_protein_SrpR_degtagged_4x_forward__complex_part_P_BetI_protein_BetI_degtagged_4x_forward__part_UTR1_forward_part_PhlF_forward_part_t16_forward_; kb__one_step_cooperative_binding*protein_SrpR_degtagged^4*ordered_polymer_part_P_SrpR_forward_complex_part_P_BetI_protein_BetI_degtagged_4x_forward__part_UTR1_forward_part_PhlF_forward_part_t16_forward_;
  r7rev: ordered_polymer_complex_part_P_SrpR_protein_SrpR_degtagged_4x_forward__complex_part_P_BetI_protein_BetI_degtagged_4x_forward__part_UTR1_forward_part_PhlF_forward_part_t16_forward_ => 4 protein_SrpR_degtagged + ordered_polymer_part_P_SrpR_forward_complex_part_P_BetI_protein_BetI_degtagged_4x_forward__part_UTR1_forward_part_PhlF_forward_part_t16_forward_; ku__one_step_cooperative_binding*ordered_polymer_complex_part_P_SrpR_protein_SrpR_degtagged_4x_forward__complex_part_P_BetI_protein_BetI_degtagged_4x_forward__part_UTR1_forward_part_PhlF_forward_part_t16_forward_;
  r8: ordered_polymer_complex_part_P_SrpR_protein_SrpR_degtagged_4x_forward__complex_part_P_BetI_protein_BetI_degtagged_4x_forward__part_UTR1_forward_part_PhlF_forward_part_t16_forward_ => ordered_polymer_complex_part_P_SrpR_protein_SrpR_degtagged_4x_forward__complex_part_P_BetI_protein_BetI_degtagged_4x_forward__part_UTR1_forward_part_PhlF_forward_part_t16_forward_ + rna_part_P_BetI_forward_part_UTR1_forward_part_PhlF_forward_part_t16_forward_; ktx__simple_transcription*ordered_polymer_complex_part_P_SrpR_protein_SrpR_degtagged_4x_forward__complex_part_P_BetI_protein_BetI_degtagged_4x_forward__part_UTR1_forward_part_PhlF_forward_part_t16_forward_;
  r9: dna_part_P_SrpR_forward_part_P_BetI_forward_part_UTR1_forward_part_PhlF_forward_part_t16_forward_ => dna_part_P_SrpR_forward_part_P_BetI_forward_part_UTR1_forward_part_PhlF_forward_part_t16_forward_ + rna_part_P_BetI_forward_part_UTR1_forward_part_PhlF_forward_part_t16_forward_; ktx_P_SrpR_leak_simple_transcription*dna_part_P_SrpR_forward_part_P_BetI_forward_part_UTR1_forward_part_PhlF_forward_part_t16_forward_;
  r10: 4 protein_SrpR_degtagged + dna_part_P_SrpR_forward_part_P_BetI_forward_part_UTR1_forward_part_PhlF_forward_part_t16_forward_ => ordered_polymer_complex_part_P_SrpR_protein_SrpR_degtagged_4x_forward__part_P_BetI_forward_part_UTR1_forward_part_PhlF_forward_part_t16_forward_; kb__one_step_cooperative_binding*protein_SrpR_degtagged^4*dna_part_P_SrpR_forward_part_P_BetI_forward_part_UTR1_forward_part_PhlF_forward_part_t16_forward_;
  r10rev: ordered_polymer_complex_part_P_SrpR_protein_SrpR_degtagged_4x_forward__part_P_BetI_forward_part_UTR1_forward_part_PhlF_forward_part_t16_forward_ => 4 protein_SrpR_degtagged + dna_part_P_SrpR_forward_part_P_BetI_forward_part_UTR1_forward_part_PhlF_forward_part_t16_forward_; ku__one_step_cooperative_binding*ordered_polymer_complex_part_P_SrpR_protein_SrpR_degtagged_4x_forward__part_P_BetI_forward_part_UTR1_forward_part_PhlF_forward_part_t16_forward_;
  r11: ordered_polymer_complex_part_P_SrpR_protein_SrpR_degtagged_4x_forward__part_P_BetI_forward_part_UTR1_forward_part_PhlF_forward_part_t16_forward_ => ordered_polymer_complex_part_P_SrpR_protein_SrpR_degtagged_4x_forward__part_P_BetI_forward_part_UTR1_forward_part_PhlF_forward_part_t16_forward_ + rna_part_P_BetI_forward_part_UTR1_forward_part_PhlF_forward_part_t16_forward_; ktx__simple_transcription*ordered_polymer_complex_part_P_SrpR_protein_SrpR_degtagged_4x_forward__part_P_BetI_forward_part_UTR1_forward_part_PhlF_forward_part_t16_forward_;
  r12: dna_part_P_SrpR_forward_part_P_BetI_forward_part_UTR1_forward_part_PhlF_forward_part_t16_forward_ => dna_part_P_SrpR_forward_part_P_BetI_forward_part_UTR1_forward_part_PhlF_forward_part_t16_forward_ + rna_part_UTR1_forward_part_PhlF_forward_part_t16_forward_; ktx_P_BetI_leak_simple_transcription*dna_part_P_SrpR_forward_part_P_BetI_forward_part_UTR1_forward_part_PhlF_forward_part_t16_forward_;
  r13: 4 protein_BetI_degtagged + dna_part_P_SrpR_forward_part_P_BetI_forward_part_UTR1_forward_part_PhlF_forward_part_t16_forward_ => ordered_polymer_part_P_SrpR_forward_complex_part_P_BetI_protein_BetI_degtagged_4x_forward__part_UTR1_forward_part_PhlF_forward_part_t16_forward_; kb__one_step_cooperative_binding*protein_BetI_degtagged^4*dna_part_P_SrpR_forward_part_P_BetI_forward_part_UTR1_forward_part_PhlF_forward_part_t16_forward_;
  r13rev: ordered_polymer_part_P_SrpR_forward_complex_part_P_BetI_protein_BetI_degtagged_4x_forward__part_UTR1_forward_part_PhlF_forward_part_t16_forward_ => 4 protein_BetI_degtagged + dna_part_P_SrpR_forward_part_P_BetI_forward_part_UTR1_forward_part_PhlF_forward_part_t16_forward_; ku__one_step_cooperative_binding*ordered_polymer_part_P_SrpR_forward_complex_part_P_BetI_protein_BetI_degtagged_4x_forward__part_UTR1_forward_part_PhlF_forward_part_t16_forward_;
  r14: ordered_polymer_part_P_SrpR_forward_complex_part_P_BetI_protein_BetI_degtagged_4x_forward__part_UTR1_forward_part_PhlF_forward_part_t16_forward_ => ordered_polymer_part_P_SrpR_forward_complex_part_P_BetI_protein_BetI_degtagged_4x_forward__part_UTR1_forward_part_PhlF_forward_part_t16_forward_ + rna_part_UTR1_forward_part_PhlF_forward_part_t16_forward_; ktx__simple_transcription*ordered_polymer_part_P_SrpR_forward_complex_part_P_BetI_protein_BetI_degtagged_4x_forward__part_UTR1_forward_part_PhlF_forward_part_t16_forward_;
  r15: ordered_polymer_complex_part_P_Tac_protein_LacI_input_4x_forward__part_P_Tet_forward_part_UTR1_forward_part_SrpR_forward_part_t16_forward_ => ordered_polymer_complex_part_P_Tac_protein_LacI_input_4x_forward__part_P_Tet_forward_part_UTR1_forward_part_SrpR_forward_part_t16_forward_ + rna_part_UTR1_forward_part_SrpR_forward_part_t16_forward_; ktx_P_Tet_leak_simple_transcription*ordered_polymer_complex_part_P_Tac_protein_LacI_input_4x_forward__part_P_Tet_forward_part_UTR1_forward_part_SrpR_forward_part_t16_forward_;
  r16: 4 protein_TetR_input + ordered_polymer_complex_part_P_Tac_protein_LacI_input_4x_forward__part_P_Tet_forward_part_UTR1_forward_part_SrpR_forward_part_t16_forward_ => ordered_polymer_complex_part_P_Tac_protein_LacI_input_4x_forward__complex_part_P_Tet_protein_TetR_input_4x_forward__part_UTR1_forward_part_SrpR_forward_part_t16_forward_; kb__one_step_cooperative_binding*protein_TetR_input^4*ordered_polymer_complex_part_P_Tac_protein_LacI_input_4x_forward__part_P_Tet_forward_part_UTR1_forward_part_SrpR_forward_part_t16_forward_;
  r16rev: ordered_polymer_complex_part_P_Tac_protein_LacI_input_4x_forward__complex_part_P_Tet_protein_TetR_input_4x_forward__part_UTR1_forward_part_SrpR_forward_part_t16_forward_ => 4 protein_TetR_input + ordered_polymer_complex_part_P_Tac_protein_LacI_input_4x_forward__part_P_Tet_forward_part_UTR1_forward_part_SrpR_forward_part_t16_forward_; ku__one_step_cooperative_binding*ordered_polymer_complex_part_P_Tac_protein_LacI_input_4x_forward__complex_part_P_Tet_protein_TetR_input_4x_forward__part_UTR1_forward_part_SrpR_forward_part_t16_forward_;
  r17: ordered_polymer_complex_part_P_Tac_protein_LacI_input_4x_forward__complex_part_P_Tet_protein_TetR_input_4x_forward__part_UTR1_forward_part_SrpR_forward_part_t16_forward_ => ordered_polymer_complex_part_P_Tac_protein_LacI_input_4x_forward__complex_part_P_Tet_protein_TetR_input_4x_forward__part_UTR1_forward_part_SrpR_forward_part_t16_forward_ + rna_part_UTR1_forward_part_SrpR_forward_part_t16_forward_; ktx__simple_transcription*ordered_polymer_complex_part_P_Tac_protein_LacI_input_4x_forward__complex_part_P_Tet_protein_TetR_input_4x_forward__part_UTR1_forward_part_SrpR_forward_part_t16_forward_;
  r18: ordered_polymer_part_P_Tac_forward_complex_part_P_Tet_protein_TetR_input_4x_forward__part_UTR1_forward_part_SrpR_forward_part_t16_forward_ => ordered_polymer_part_P_Tac_forward_complex_part_P_Tet_protein_TetR_input_4x_forward__part_UTR1_forward_part_SrpR_forward_part_t16_forward_ + rna_part_P_Tet_forward_part_UTR1_forward_part_SrpR_forward_part_t16_forward_; ktx_P_Tac_leak_simple_transcription*ordered_polymer_part_P_Tac_forward_complex_part_P_Tet_protein_TetR_input_4x_forward__part_UTR1_forward_part_SrpR_forward_part_t16_forward_;
  r19: 4 protein_LacI_input + ordered_polymer_part_P_Tac_forward_complex_part_P_Tet_protein_TetR_input_4x_forward__part_UTR1_forward_part_SrpR_forward_part_t16_forward_ => ordered_polymer_complex_part_P_Tac_protein_LacI_input_4x_forward__complex_part_P_Tet_protein_TetR_input_4x_forward__part_UTR1_forward_part_SrpR_forward_part_t16_forward_; kb__one_step_cooperative_binding*protein_LacI_input^4*ordered_polymer_part_P_Tac_forward_complex_part_P_Tet_protein_TetR_input_4x_forward__part_UTR1_forward_part_SrpR_forward_part_t16_forward_;
  r19rev: ordered_polymer_complex_part_P_Tac_protein_LacI_input_4x_forward__complex_part_P_Tet_protein_TetR_input_4x_forward__part_UTR1_forward_part_SrpR_forward_part_t16_forward_ => 4 protein_LacI_input + ordered_polymer_part_P_Tac_forward_complex_part_P_Tet_protein_TetR_input_4x_forward__part_UTR1_forward_part_SrpR_forward_part_t16_forward_; ku__one_step_cooperative_binding*ordered_polymer_complex_part_P_Tac_protein_LacI_input_4x_forward__complex_part_P_Tet_protein_TetR_input_4x_forward__part_UTR1_forward_part_SrpR_forward_part_t16_forward_;
  r20: ordered_polymer_complex_part_P_Tac_protein_LacI_input_4x_forward__complex_part_P_Tet_protein_TetR_input_4x_forward__part_UTR1_forward_part_SrpR_forward_part_t16_forward_ => ordered_polymer_complex_part_P_Tac_protein_LacI_input_4x_forward__complex_part_P_Tet_protein_TetR_input_4x_forward__part_UTR1_forward_part_SrpR_forward_part_t16_forward_ + rna_part_P_Tet_forward_part_UTR1_forward_part_SrpR_forward_part_t16_forward_; ktx__simple_transcription*ordered_polymer_complex_part_P_Tac_protein_LacI_input_4x_forward__complex_part_P_Tet_protein_TetR_input_4x_forward__part_UTR1_forward_part_SrpR_forward_part_t16_forward_;
  r21: dna_part_P_Tac_forward_part_P_Tet_forward_part_UTR1_forward_part_SrpR_forward_part_t16_forward_ => dna_part_P_Tac_forward_part_P_Tet_forward_part_UTR1_forward_part_SrpR_forward_part_t16_forward_ + rna_part_P_Tet_forward_part_UTR1_forward_part_SrpR_forward_part_t16_forward_; ktx_P_Tac_leak_simple_transcription*dna_part_P_Tac_forward_part_P_Tet_forward_part_UTR1_forward_part_SrpR_forward_part_t16_forward_;
  r22: 4 protein_LacI_input + dna_part_P_Tac_forward_part_P_Tet_forward_part_UTR1_forward_part_SrpR_forward_part_t16_forward_ => ordered_polymer_complex_part_P_Tac_protein_LacI_input_4x_forward__part_P_Tet_forward_part_UTR1_forward_part_SrpR_forward_part_t16_forward_; kb__one_step_cooperative_binding*protein_LacI_input^4*dna_part_P_Tac_forward_part_P_Tet_forward_part_UTR1_forward_part_SrpR_forward_part_t16_forward_;
  r22rev: ordered_polymer_complex_part_P_Tac_protein_LacI_input_4x_forward__part_P_Tet_forward_part_UTR1_forward_part_SrpR_forward_part_t16_forward_ => 4 protein_LacI_input + dna_part_P_Tac_forward_part_P_Tet_forward_part_UTR1_forward_part_SrpR_forward_part_t16_forward_; ku__one_step_cooperative_binding*ordered_polymer_complex_part_P_Tac_protein_LacI_input_4x_forward__part_P_Tet_forward_part_UTR1_forward_part_SrpR_forward_part_t16_forward_;
  r23: ordered_polymer_complex_part_P_Tac_protein_LacI_input_4x_forward__part_P_Tet_forward_part_UTR1_forward_part_SrpR_forward_part_t16_forward_ => ordered_polymer_complex_part_P_Tac_protein_LacI_input_4x_forward__part_P_Tet_forward_part_UTR1_forward_part_SrpR_forward_part_t16_forward_ + rna_part_P_Tet_forward_part_UTR1_forward_part_SrpR_forward_part_t16_forward_; ktx__simple_transcription*ordered_polymer_complex_part_P_Tac_protein_LacI_input_4x_forward__part_P_Tet_forward_part_UTR1_forward_part_SrpR_forward_part_t16_forward_;
  r24: dna_part_P_Tac_forward_part_P_Tet_forward_part_UTR1_forward_part_SrpR_forward_part_t16_forward_ => dna_part_P_Tac_forward_part_P_Tet_forward_part_UTR1_forward_part_SrpR_forward_part_t16_forward_ + rna_part_UTR1_forward_part_SrpR_forward_part_t16_forward_; ktx_P_Tet_leak_simple_transcription*dna_part_P_Tac_forward_part_P_Tet_forward_part_UTR1_forward_part_SrpR_forward_part_t16_forward_;
  r25: 4 protein_TetR_input + dna_part_P_Tac_forward_part_P_Tet_forward_part_UTR1_forward_part_SrpR_forward_part_t16_forward_ => ordered_polymer_part_P_Tac_forward_complex_part_P_Tet_protein_TetR_input_4x_forward__part_UTR1_forward_part_SrpR_forward_part_t16_forward_; kb__one_step_cooperative_binding*protein_TetR_input^4*dna_part_P_Tac_forward_part_P_Tet_forward_part_UTR1_forward_part_SrpR_forward_part_t16_forward_;
  r25rev: ordered_polymer_part_P_Tac_forward_complex_part_P_Tet_protein_TetR_input_4x_forward__part_UTR1_forward_part_SrpR_forward_part_t16_forward_ => 4 protein_TetR_input + dna_part_P_Tac_forward_part_P_Tet_forward_part_UTR1_forward_part_SrpR_forward_part_t16_forward_; ku__one_step_cooperative_binding*ordered_polymer_part_P_Tac_forward_complex_part_P_Tet_protein_TetR_input_4x_forward__part_UTR1_forward_part_SrpR_forward_part_t16_forward_;
  r26: ordered_polymer_part_P_Tac_forward_complex_part_P_Tet_protein_TetR_input_4x_forward__part_UTR1_forward_part_SrpR_forward_part_t16_forward_ => ordered_polymer_part_P_Tac_forward_complex_part_P_Tet_protein_TetR_input_4x_forward__part_UTR1_forward_part_SrpR_forward_part_t16_forward_ + rna_part_UTR1_forward_part_SrpR_forward_part_t16_forward_; ktx__simple_transcription*ordered_polymer_part_P_Tac_forward_complex_part_P_Tet_protein_TetR_input_4x_forward__part_UTR1_forward_part_SrpR_forward_part_t16_forward_;
  r27: ordered_polymer_complex_part_P_HlyIIR_protein_HlyIIR_degtagged_4x_forward__part_P_AmeR_forward_part_UTR1_forward_part_BetI_forward_part_t16_forward_ => ordered_polymer_complex_part_P_HlyIIR_protein_HlyIIR_degtagged_4x_forward__part_P_AmeR_forward_part_UTR1_forward_part_BetI_forward_part_t16_forward_ + rna_part_UTR1_forward_part_BetI_forward_part_t16_forward_; ktx_P_AmeR_leak_simple_transcription*ordered_polymer_complex_part_P_HlyIIR_protein_HlyIIR_degtagged_4x_forward__part_P_AmeR_forward_part_UTR1_forward_part_BetI_forward_part_t16_forward_;
  r28: 4 protein_AmeR_degtagged + ordered_polymer_complex_part_P_HlyIIR_protein_HlyIIR_degtagged_4x_forward__part_P_AmeR_forward_part_UTR1_forward_part_BetI_forward_part_t16_forward_ => ordered_polymer_complex_part_P_HlyIIR_protein_HlyIIR_degtagged_4x_forward__complex_part_P_AmeR_protein_AmeR_degtagged_4x_forward__part_UTR1_forward_part_BetI_forward_part_t16_forward_; kb__one_step_cooperative_binding*protein_AmeR_degtagged^4*ordered_polymer_complex_part_P_HlyIIR_protein_HlyIIR_degtagged_4x_forward__part_P_AmeR_forward_part_UTR1_forward_part_BetI_forward_part_t16_forward_;
  r28rev: ordered_polymer_complex_part_P_HlyIIR_protein_HlyIIR_degtagged_4x_forward__complex_part_P_AmeR_protein_AmeR_degtagged_4x_forward__part_UTR1_forward_part_BetI_forward_part_t16_forward_ => 4 protein_AmeR_degtagged + ordered_polymer_complex_part_P_HlyIIR_protein_HlyIIR_degtagged_4x_forward__part_P_AmeR_forward_part_UTR1_forward_part_BetI_forward_part_t16_forward_; ku__one_step_cooperative_binding*ordered_polymer_complex_part_P_HlyIIR_protein_HlyIIR_degtagged_4x_forward__complex_part_P_AmeR_protein_AmeR_degtagged_4x_forward__part_UTR1_forward_part_BetI_forward_part_t16_forward_;
  r29: ordered_polymer_complex_part_P_HlyIIR_protein_HlyIIR_degtagged_4x_forward__complex_part_P_AmeR_protein_AmeR_degtagged_4x_forward__part_UTR1_forward_part_BetI_forward_part_t16_forward_ => ordered_polymer_complex_part_P_HlyIIR_protein_HlyIIR_degtagged_4x_forward__complex_part_P_AmeR_protein_AmeR_degtagged_4x_forward__part_UTR1_forward_part_BetI_forward_part_t16_forward_ + rna_part_UTR1_forward_part_BetI_forward_part_t16_forward_; ktx__simple_transcription*ordered_polymer_complex_part_P_HlyIIR_protein_HlyIIR_degtagged_4x_forward__complex_part_P_AmeR_protein_AmeR_degtagged_4x_forward__part_UTR1_forward_part_BetI_forward_part_t16_forward_;
  r30: ordered_polymer_part_P_HlyIIR_forward_complex_part_P_AmeR_protein_AmeR_degtagged_4x_forward__part_UTR1_forward_part_BetI_forward_part_t16_forward_ => ordered_polymer_part_P_HlyIIR_forward_complex_part_P_AmeR_protein_AmeR_degtagged_4x_forward__part_UTR1_forward_part_BetI_forward_part_t16_forward_ + rna_part_P_AmeR_forward_part_UTR1_forward_part_BetI_forward_part_t16_forward_; ktx_P_HlyIIR_leak_simple_transcription*ordered_polymer_part_P_HlyIIR_forward_complex_part_P_AmeR_protein_AmeR_degtagged_4x_forward__part_UTR1_forward_part_BetI_forward_part_t16_forward_;
  r31: 4 protein_HlyIIR_degtagged + ordered_polymer_part_P_HlyIIR_forward_complex_part_P_AmeR_protein_AmeR_degtagged_4x_forward__part_UTR1_forward_part_BetI_forward_part_t16_forward_ => ordered_polymer_complex_part_P_HlyIIR_protein_HlyIIR_degtagged_4x_forward__complex_part_P_AmeR_protein_AmeR_degtagged_4x_forward__part_UTR1_forward_part_BetI_forward_part_t16_forward_; kb__one_step_cooperative_binding*protein_HlyIIR_degtagged^4*ordered_polymer_part_P_HlyIIR_forward_complex_part_P_AmeR_protein_AmeR_degtagged_4x_forward__part_UTR1_forward_part_BetI_forward_part_t16_forward_;
  r31rev: ordered_polymer_complex_part_P_HlyIIR_protein_HlyIIR_degtagged_4x_forward__complex_part_P_AmeR_protein_AmeR_degtagged_4x_forward__part_UTR1_forward_part_BetI_forward_part_t16_forward_ => 4 protein_HlyIIR_degtagged + ordered_polymer_part_P_HlyIIR_forward_complex_part_P_AmeR_protein_AmeR_degtagged_4x_forward__part_UTR1_forward_part_BetI_forward_part_t16_forward_; ku__one_step_cooperative_binding*ordered_polymer_complex_part_P_HlyIIR_protein_HlyIIR_degtagged_4x_forward__complex_part_P_AmeR_protein_AmeR_degtagged_4x_forward__part_UTR1_forward_part_BetI_forward_part_t16_forward_;
  r32: ordered_polymer_complex_part_P_HlyIIR_protein_HlyIIR_degtagged_4x_forward__complex_part_P_AmeR_protein_AmeR_degtagged_4x_forward__part_UTR1_forward_part_BetI_forward_part_t16_forward_ => ordered_polymer_complex_part_P_HlyIIR_protein_HlyIIR_degtagged_4x_forward__complex_part_P_AmeR_protein_AmeR_degtagged_4x_forward__part_UTR1_forward_part_BetI_forward_part_t16_forward_ + rna_part_P_AmeR_forward_part_UTR1_forward_part_BetI_forward_part_t16_forward_; ktx__simple_transcription*ordered_polymer_complex_part_P_HlyIIR_protein_HlyIIR_degtagged_4x_forward__complex_part_P_AmeR_protein_AmeR_degtagged_4x_forward__part_UTR1_forward_part_BetI_forward_part_t16_forward_;
  r33: dna_part_P_HlyIIR_forward_part_P_AmeR_forward_part_UTR1_forward_part_BetI_forward_part_t16_forward_ => dna_part_P_HlyIIR_forward_part_P_AmeR_forward_part_UTR1_forward_part_BetI_forward_part_t16_forward_ + rna_part_P_AmeR_forward_part_UTR1_forward_part_BetI_forward_part_t16_forward_; ktx_P_HlyIIR_leak_simple_transcription*dna_part_P_HlyIIR_forward_part_P_AmeR_forward_part_UTR1_forward_part_BetI_forward_part_t16_forward_;
  r34: 4 protein_HlyIIR_degtagged + dna_part_P_HlyIIR_forward_part_P_AmeR_forward_part_UTR1_forward_part_BetI_forward_part_t16_forward_ => ordered_polymer_complex_part_P_HlyIIR_protein_HlyIIR_degtagged_4x_forward__part_P_AmeR_forward_part_UTR1_forward_part_BetI_forward_part_t16_forward_; kb__one_step_cooperative_binding*protein_HlyIIR_degtagged^4*dna_part_P_HlyIIR_forward_part_P_AmeR_forward_part_UTR1_forward_part_BetI_forward_part_t16_forward_;
  r34rev: ordered_polymer_complex_part_P_HlyIIR_protein_HlyIIR_degtagged_4x_forward__part_P_AmeR_forward_part_UTR1_forward_part_BetI_forward_part_t16_forward_ => 4 protein_HlyIIR_degtagged + dna_part_P_HlyIIR_forward_part_P_AmeR_forward_part_UTR1_forward_part_BetI_forward_part_t16_forward_; ku__one_step_cooperative_binding*ordered_polymer_complex_part_P_HlyIIR_protein_HlyIIR_degtagged_4x_forward__part_P_AmeR_forward_part_UTR1_forward_part_BetI_forward_part_t16_forward_;
  r35: ordered_polymer_complex_part_P_HlyIIR_protein_HlyIIR_degtagged_4x_forward__part_P_AmeR_forward_part_UTR1_forward_part_BetI_forward_part_t16_forward_ => ordered_polymer_complex_part_P_HlyIIR_protein_HlyIIR_degtagged_4x_forward__part_P_AmeR_forward_part_UTR1_forward_part_BetI_forward_part_t16_forward_ + rna_part_P_AmeR_forward_part_UTR1_forward_part_BetI_forward_part_t16_forward_; ktx__simple_transcription*ordered_polymer_complex_part_P_HlyIIR_protein_HlyIIR_degtagged_4x_forward__part_P_AmeR_forward_part_UTR1_forward_part_BetI_forward_part_t16_forward_;
  r36: dna_part_P_HlyIIR_forward_part_P_AmeR_forward_part_UTR1_forward_part_BetI_forward_part_t16_forward_ => dna_part_P_HlyIIR_forward_part_P_AmeR_forward_part_UTR1_forward_part_BetI_forward_part_t16_forward_ + rna_part_UTR1_forward_part_BetI_forward_part_t16_forward_; ktx_P_AmeR_leak_simple_transcription*dna_part_P_HlyIIR_forward_part_P_AmeR_forward_part_UTR1_forward_part_BetI_forward_part_t16_forward_;
  r37: 4 protein_AmeR_degtagged + dna_part_P_HlyIIR_forward_part_P_AmeR_forward_part_UTR1_forward_part_BetI_forward_part_t16_forward_ => ordered_polymer_part_P_HlyIIR_forward_complex_part_P_AmeR_protein_AmeR_degtagged_4x_forward__part_UTR1_forward_part_BetI_forward_part_t16_forward_; kb__one_step_cooperative_binding*protein_AmeR_degtagged^4*dna_part_P_HlyIIR_forward_part_P_AmeR_forward_part_UTR1_forward_part_BetI_forward_part_t16_forward_;
  r37rev: ordered_polymer_part_P_HlyIIR_forward_complex_part_P_AmeR_protein_AmeR_degtagged_4x_forward__part_UTR1_forward_part_BetI_forward_part_t16_forward_ => 4 protein_AmeR_degtagged + dna_part_P_HlyIIR_forward_part_P_AmeR_forward_part_UTR1_forward_part_BetI_forward_part_t16_forward_; ku__one_step_cooperative_binding*ordered_polymer_part_P_HlyIIR_forward_complex_part_P_AmeR_protein_AmeR_degtagged_4x_forward__part_UTR1_forward_part_BetI_forward_part_t16_forward_;
  r38: ordered_polymer_part_P_HlyIIR_forward_complex_part_P_AmeR_protein_AmeR_degtagged_4x_forward__part_UTR1_forward_part_BetI_forward_part_t16_forward_ => ordered_polymer_part_P_HlyIIR_forward_complex_part_P_AmeR_protein_AmeR_degtagged_4x_forward__part_UTR1_forward_part_BetI_forward_part_t16_forward_ + rna_part_UTR1_forward_part_BetI_forward_part_t16_forward_; ktx__simple_transcription*ordered_polymer_part_P_HlyIIR_forward_complex_part_P_AmeR_protein_AmeR_degtagged_4x_forward__part_UTR1_forward_part_BetI_forward_part_t16_forward_;
  r39: dna_part_P_Tet_forward_part_UTR1_forward_part_AmeR_forward_part_t16_forward_ => dna_part_P_Tet_forward_part_UTR1_forward_part_AmeR_forward_part_t16_forward_ + rna_part_UTR1_forward_part_AmeR_forward_part_t16_forward_; ktx_P_Tet_leak_simple_transcription*dna_part_P_Tet_forward_part_UTR1_forward_part_AmeR_forward_part_t16_forward_;
  r40: 4 protein_TetR_input + dna_part_P_Tet_forward_part_UTR1_forward_part_AmeR_forward_part_t16_forward_ => ordered_polymer_complex_part_P_Tet_protein_TetR_input_4x_forward__part_UTR1_forward_part_AmeR_forward_part_t16_forward_; kb__one_step_cooperative_binding*protein_TetR_input^4*dna_part_P_Tet_forward_part_UTR1_forward_part_AmeR_forward_part_t16_forward_;
  r40rev: ordered_polymer_complex_part_P_Tet_protein_TetR_input_4x_forward__part_UTR1_forward_part_AmeR_forward_part_t16_forward_ => 4 protein_TetR_input + dna_part_P_Tet_forward_part_UTR1_forward_part_AmeR_forward_part_t16_forward_; ku__one_step_cooperative_binding*ordered_polymer_complex_part_P_Tet_protein_TetR_input_4x_forward__part_UTR1_forward_part_AmeR_forward_part_t16_forward_;
  r41: ordered_polymer_complex_part_P_Tet_protein_TetR_input_4x_forward__part_UTR1_forward_part_AmeR_forward_part_t16_forward_ => ordered_polymer_complex_part_P_Tet_protein_TetR_input_4x_forward__part_UTR1_forward_part_AmeR_forward_part_t16_forward_ + rna_part_UTR1_forward_part_AmeR_forward_part_t16_forward_; ktx__simple_transcription*ordered_polymer_complex_part_P_Tet_protein_TetR_input_4x_forward__part_UTR1_forward_part_AmeR_forward_part_t16_forward_;
  r42: dna_part_P_Tac_forward_part_UTR1_forward_part_HlyIIR_forward_part_t16_forward_ => dna_part_P_Tac_forward_part_UTR1_forward_part_HlyIIR_forward_part_t16_forward_ + rna_part_UTR1_forward_part_HlyIIR_forward_part_t16_forward_; ktx_P_Tac_leak_simple_transcription*dna_part_P_Tac_forward_part_UTR1_forward_part_HlyIIR_forward_part_t16_forward_;
  r43: 4 protein_LacI_input + dna_part_P_Tac_forward_part_UTR1_forward_part_HlyIIR_forward_part_t16_forward_ => ordered_polymer_complex_part_P_Tac_protein_LacI_input_4x_forward__part_UTR1_forward_part_HlyIIR_forward_part_t16_forward_; kb__one_step_cooperative_binding*protein_LacI_input^4*dna_part_P_Tac_forward_part_UTR1_forward_part_HlyIIR_forward_part_t16_forward_;
  r43rev: ordered_polymer_complex_part_P_Tac_protein_LacI_input_4x_forward__part_UTR1_forward_part_HlyIIR_forward_part_t16_forward_ => 4 protein_LacI_input + dna_part_P_Tac_forward_part_UTR1_forward_part_HlyIIR_forward_part_t16_forward_; ku__one_step_cooperative_binding*ordered_polymer_complex_part_P_Tac_protein_LacI_input_4x_forward__part_UTR1_forward_part_HlyIIR_forward_part_t16_forward_;
  r44: ordered_polymer_complex_part_P_Tac_protein_LacI_input_4x_forward__part_UTR1_forward_part_HlyIIR_forward_part_t16_forward_ => ordered_polymer_complex_part_P_Tac_protein_LacI_input_4x_forward__part_UTR1_forward_part_HlyIIR_forward_part_t16_forward_ + rna_part_UTR1_forward_part_HlyIIR_forward_part_t16_forward_; ktx__simple_transcription*ordered_polymer_complex_part_P_Tac_protein_LacI_input_4x_forward__part_UTR1_forward_part_HlyIIR_forward_part_t16_forward_;
  r45: 4 complex_protein_AraC_input_2x_protein_Ara_input_2x_ + dna_part_P_BAD_forward_part_UTR1_forward_part_AmtR_forward_part_t16_forward_ => ordered_polymer_complex_complex_protein_AraC_input_2x_protein_Ara_input_2x__4x_part_P_BAD_forward__part_UTR1_forward_part_AmtR_forward_part_t16_forward_; kb__one_step_cooperative_binding*complex_protein_AraC_input_2x_protein_Ara_input_2x_^4*dna_part_P_BAD_forward_part_UTR1_forward_part_AmtR_forward_part_t16_forward_;
  r45rev: ordered_polymer_complex_complex_protein_AraC_input_2x_protein_Ara_input_2x__4x_part_P_BAD_forward__part_UTR1_forward_part_AmtR_forward_part_t16_forward_ => 4 complex_protein_AraC_input_2x_protein_Ara_input_2x_ + dna_part_P_BAD_forward_part_UTR1_forward_part_AmtR_forward_part_t16_forward_; ku__one_step_cooperative_binding*ordered_polymer_complex_complex_protein_AraC_input_2x_protein_Ara_input_2x__4x_part_P_BAD_forward__part_UTR1_forward_part_AmtR_forward_part_t16_forward_;
  r46: ordered_polymer_complex_complex_protein_AraC_input_2x_protein_Ara_input_2x__4x_part_P_BAD_forward__part_UTR1_forward_part_AmtR_forward_part_t16_forward_ => ordered_polymer_complex_complex_protein_AraC_input_2x_protein_Ara_input_2x__4x_part_P_BAD_forward__part_UTR1_forward_part_AmtR_forward_part_t16_forward_ + rna_part_UTR1_forward_part_AmtR_forward_part_t16_forward_; ktx_P_BAD_protein_AraC_input_2x_protein_Ara_input_2x_simple_transcription*ordered_polymer_complex_complex_protein_AraC_input_2x_protein_Ara_input_2x__4x_part_P_BAD_forward__part_UTR1_forward_part_AmtR_forward_part_t16_forward_;
  r47: ordered_polymer_complex_part_P_PhlF_protein_PhlF_degtagged_4x_forward__part_P_Inv2_forward_part_UTR1_forward_part_YFP_forward_part_t16_forward_ => ordered_polymer_complex_part_P_PhlF_protein_PhlF_degtagged_4x_forward__part_P_Inv2_forward_part_UTR1_forward_part_YFP_forward_part_t16_forward_ + rna_part_UTR1_forward_part_YFP_forward_part_t16_forward_; ktx_P_Inv2_leak_simple_transcription*ordered_polymer_complex_part_P_PhlF_protein_PhlF_degtagged_4x_forward__part_P_Inv2_forward_part_UTR1_forward_part_YFP_forward_part_t16_forward_;
  r48: 4 protein_Inv2_degtagged + ordered_polymer_complex_part_P_PhlF_protein_PhlF_degtagged_4x_forward__part_P_Inv2_forward_part_UTR1_forward_part_YFP_forward_part_t16_forward_ => ordered_polymer_complex_part_P_PhlF_protein_PhlF_degtagged_4x_forward__complex_part_P_Inv2_protein_Inv2_degtagged_4x_forward__part_UTR1_forward_part_YFP_forward_part_t16_forward_; kb__one_step_cooperative_binding*protein_Inv2_degtagged^4*ordered_polymer_complex_part_P_PhlF_protein_PhlF_degtagged_4x_forward__part_P_Inv2_forward_part_UTR1_forward_part_YFP_forward_part_t16_forward_;
  r48rev: ordered_polymer_complex_part_P_PhlF_protein_PhlF_degtagged_4x_forward__complex_part_P_Inv2_protein_Inv2_degtagged_4x_forward__part_UTR1_forward_part_YFP_forward_part_t16_forward_ => 4 protein_Inv2_degtagged + ordered_polymer_complex_part_P_PhlF_protein_PhlF_degtagged_4x_forward__part_P_Inv2_forward_part_UTR1_forward_part_YFP_forward_part_t16_forward_; ku__one_step_cooperative_binding*ordered_polymer_complex_part_P_PhlF_protein_PhlF_degtagged_4x_forward__complex_part_P_Inv2_protein_Inv2_degtagged_4x_forward__part_UTR1_forward_part_YFP_forward_part_t16_forward_;
  r49: ordered_polymer_complex_part_P_PhlF_protein_PhlF_degtagged_4x_forward__complex_part_P_Inv2_protein_Inv2_degtagged_4x_forward__part_UTR1_forward_part_YFP_forward_part_t16_forward_ => ordered_polymer_complex_part_P_PhlF_protein_PhlF_degtagged_4x_forward__complex_part_P_Inv2_protein_Inv2_degtagged_4x_forward__part_UTR1_forward_part_YFP_forward_part_t16_forward_ + rna_part_UTR1_forward_part_YFP_forward_part_t16_forward_; ktx__simple_transcription*ordered_polymer_complex_part_P_PhlF_protein_PhlF_degtagged_4x_forward__complex_part_P_Inv2_protein_Inv2_degtagged_4x_forward__part_UTR1_forward_part_YFP_forward_part_t16_forward_;
  r50: ordered_polymer_part_P_PhlF_forward_complex_part_P_Inv2_protein_Inv2_degtagged_4x_forward__part_UTR1_forward_part_YFP_forward_part_t16_forward_ => ordered_polymer_part_P_PhlF_forward_complex_part_P_Inv2_protein_Inv2_degtagged_4x_forward__part_UTR1_forward_part_YFP_forward_part_t16_forward_ + rna_part_P_Inv2_forward_part_UTR1_forward_part_YFP_forward_part_t16_forward_; ktx_P_PhlF_leak_simple_transcription*ordered_polymer_part_P_PhlF_forward_complex_part_P_Inv2_protein_Inv2_degtagged_4x_forward__part_UTR1_forward_part_YFP_forward_part_t16_forward_;
  r51: 4 protein_PhlF_degtagged + ordered_polymer_part_P_PhlF_forward_complex_part_P_Inv2_protein_Inv2_degtagged_4x_forward__part_UTR1_forward_part_YFP_forward_part_t16_forward_ => ordered_polymer_complex_part_P_PhlF_protein_PhlF_degtagged_4x_forward__complex_part_P_Inv2_protein_Inv2_degtagged_4x_forward__part_UTR1_forward_part_YFP_forward_part_t16_forward_; kb__one_step_cooperative_binding*protein_PhlF_degtagged^4*ordered_polymer_part_P_PhlF_forward_complex_part_P_Inv2_protein_Inv2_degtagged_4x_forward__part_UTR1_forward_part_YFP_forward_part_t16_forward_;
  r51rev: ordered_polymer_complex_part_P_PhlF_protein_PhlF_degtagged_4x_forward__complex_part_P_Inv2_protein_Inv2_degtagged_4x_forward__part_UTR1_forward_part_YFP_forward_part_t16_forward_ => 4 protein_PhlF_degtagged + ordered_polymer_part_P_PhlF_forward_complex_part_P_Inv2_protein_Inv2_degtagged_4x_forward__part_UTR1_forward_part_YFP_forward_part_t16_forward_; ku__one_step_cooperative_binding*ordered_polymer_complex_part_P_PhlF_protein_PhlF_degtagged_4x_forward__complex_part_P_Inv2_protein_Inv2_degtagged_4x_forward__part_UTR1_forward_part_YFP_forward_part_t16_forward_;
  r52: ordered_polymer_complex_part_P_PhlF_protein_PhlF_degtagged_4x_forward__complex_part_P_Inv2_protein_Inv2_degtagged_4x_forward__part_UTR1_forward_part_YFP_forward_part_t16_forward_ => ordered_polymer_complex_part_P_PhlF_protein_PhlF_degtagged_4x_forward__complex_part_P_Inv2_protein_Inv2_degtagged_4x_forward__part_UTR1_forward_part_YFP_forward_part_t16_forward_ + rna_part_P_Inv2_forward_part_UTR1_forward_part_YFP_forward_part_t16_forward_; ktx__simple_transcription*ordered_polymer_complex_part_P_PhlF_protein_PhlF_degtagged_4x_forward__complex_part_P_Inv2_protein_Inv2_degtagged_4x_forward__part_UTR1_forward_part_YFP_forward_part_t16_forward_;
  r53: dna_part_P_PhlF_forward_part_P_Inv2_forward_part_UTR1_forward_part_YFP_forward_part_t16_forward_ => dna_part_P_PhlF_forward_part_P_Inv2_forward_part_UTR1_forward_part_YFP_forward_part_t16_forward_ + rna_part_P_Inv2_forward_part_UTR1_forward_part_YFP_forward_part_t16_forward_; ktx_P_PhlF_leak_simple_transcription*dna_part_P_PhlF_forward_part_P_Inv2_forward_part_UTR1_forward_part_YFP_forward_part_t16_forward_;
  r54: 4 protein_PhlF_degtagged + dna_part_P_PhlF_forward_part_P_Inv2_forward_part_UTR1_forward_part_YFP_forward_part_t16_forward_ => ordered_polymer_complex_part_P_PhlF_protein_PhlF_degtagged_4x_forward__part_P_Inv2_forward_part_UTR1_forward_part_YFP_forward_part_t16_forward_; kb__one_step_cooperative_binding*protein_PhlF_degtagged^4*dna_part_P_PhlF_forward_part_P_Inv2_forward_part_UTR1_forward_part_YFP_forward_part_t16_forward_;
  r54rev: ordered_polymer_complex_part_P_PhlF_protein_PhlF_degtagged_4x_forward__part_P_Inv2_forward_part_UTR1_forward_part_YFP_forward_part_t16_forward_ => 4 protein_PhlF_degtagged + dna_part_P_PhlF_forward_part_P_Inv2_forward_part_UTR1_forward_part_YFP_forward_part_t16_forward_; ku__one_step_cooperative_binding*ordered_polymer_complex_part_P_PhlF_protein_PhlF_degtagged_4x_forward__part_P_Inv2_forward_part_UTR1_forward_part_YFP_forward_part_t16_forward_;
  r55: ordered_polymer_complex_part_P_PhlF_protein_PhlF_degtagged_4x_forward__part_P_Inv2_forward_part_UTR1_forward_part_YFP_forward_part_t16_forward_ => ordered_polymer_complex_part_P_PhlF_protein_PhlF_degtagged_4x_forward__part_P_Inv2_forward_part_UTR1_forward_part_YFP_forward_part_t16_forward_ + rna_part_P_Inv2_forward_part_UTR1_forward_part_YFP_forward_part_t16_forward_; ktx__simple_transcription*ordered_polymer_complex_part_P_PhlF_protein_PhlF_degtagged_4x_forward__part_P_Inv2_forward_part_UTR1_forward_part_YFP_forward_part_t16_forward_;
  r56: dna_part_P_PhlF_forward_part_P_Inv2_forward_part_UTR1_forward_part_YFP_forward_part_t16_forward_ => dna_part_P_PhlF_forward_part_P_Inv2_forward_part_UTR1_forward_part_YFP_forward_part_t16_forward_ + rna_part_UTR1_forward_part_YFP_forward_part_t16_forward_; ktx_P_Inv2_leak_simple_transcription*dna_part_P_PhlF_forward_part_P_Inv2_forward_part_UTR1_forward_part_YFP_forward_part_t16_forward_;
  r57: 4 protein_Inv2_degtagged + dna_part_P_PhlF_forward_part_P_Inv2_forward_part_UTR1_forward_part_YFP_forward_part_t16_forward_ => ordered_polymer_part_P_PhlF_forward_complex_part_P_Inv2_protein_Inv2_degtagged_4x_forward__part_UTR1_forward_part_YFP_forward_part_t16_forward_; kb__one_step_cooperative_binding*protein_Inv2_degtagged^4*dna_part_P_PhlF_forward_part_P_Inv2_forward_part_UTR1_forward_part_YFP_forward_part_t16_forward_;
  r57rev: ordered_polymer_part_P_PhlF_forward_complex_part_P_Inv2_protein_Inv2_degtagged_4x_forward__part_UTR1_forward_part_YFP_forward_part_t16_forward_ => 4 protein_Inv2_degtagged + dna_part_P_PhlF_forward_part_P_Inv2_forward_part_UTR1_forward_part_YFP_forward_part_t16_forward_; ku__one_step_cooperative_binding*ordered_polymer_part_P_PhlF_forward_complex_part_P_Inv2_protein_Inv2_degtagged_4x_forward__part_UTR1_forward_part_YFP_forward_part_t16_forward_;
  r58: ordered_polymer_part_P_PhlF_forward_complex_part_P_Inv2_protein_Inv2_degtagged_4x_forward__part_UTR1_forward_part_YFP_forward_part_t16_forward_ => ordered_polymer_part_P_PhlF_forward_complex_part_P_Inv2_protein_Inv2_degtagged_4x_forward__part_UTR1_forward_part_YFP_forward_part_t16_forward_ + rna_part_UTR1_forward_part_YFP_forward_part_t16_forward_; ktx__simple_transcription*ordered_polymer_part_P_PhlF_forward_complex_part_P_Inv2_protein_Inv2_degtagged_4x_forward__part_UTR1_forward_part_YFP_forward_part_t16_forward_;
  r59: dna_part_P_AmtR_forward_part_UTR1_forward_part_Inv1_forward_part_t16_forward_ => dna_part_P_AmtR_forward_part_UTR1_forward_part_Inv1_forward_part_t16_forward_ + rna_part_UTR1_forward_part_Inv1_forward_part_t16_forward_; ktx_P_AmtR_leak_simple_transcription*dna_part_P_AmtR_forward_part_UTR1_forward_part_Inv1_forward_part_t16_forward_;
  r60: 4 protein_AmtR_degtagged + dna_part_P_AmtR_forward_part_UTR1_forward_part_Inv1_forward_part_t16_forward_ => ordered_polymer_complex_part_P_AmtR_protein_AmtR_degtagged_4x_forward__part_UTR1_forward_part_Inv1_forward_part_t16_forward_; kb__one_step_cooperative_binding*protein_AmtR_degtagged^4*dna_part_P_AmtR_forward_part_UTR1_forward_part_Inv1_forward_part_t16_forward_;
  r60rev: ordered_polymer_complex_part_P_AmtR_protein_AmtR_degtagged_4x_forward__part_UTR1_forward_part_Inv1_forward_part_t16_forward_ => 4 protein_AmtR_degtagged + dna_part_P_AmtR_forward_part_UTR1_forward_part_Inv1_forward_part_t16_forward_; ku__one_step_cooperative_binding*ordered_polymer_complex_part_P_AmtR_protein_AmtR_degtagged_4x_forward__part_UTR1_forward_part_Inv1_forward_part_t16_forward_;
  r61: ordered_polymer_complex_part_P_AmtR_protein_AmtR_degtagged_4x_forward__part_UTR1_forward_part_Inv1_forward_part_t16_forward_ => ordered_polymer_complex_part_P_AmtR_protein_AmtR_degtagged_4x_forward__part_UTR1_forward_part_Inv1_forward_part_t16_forward_ + rna_part_UTR1_forward_part_Inv1_forward_part_t16_forward_; ktx__simple_transcription*ordered_polymer_complex_part_P_AmtR_protein_AmtR_degtagged_4x_forward__part_UTR1_forward_part_Inv1_forward_part_t16_forward_;
  r62: dna_part_P_Inv1_forward_part_UTR1_forward_part_Inv2_forward_part_t16_forward_ => dna_part_P_Inv1_forward_part_UTR1_forward_part_Inv2_forward_part_t16_forward_ + rna_part_UTR1_forward_part_Inv2_forward_part_t16_forward_; ktx_P_Inv1_leak_simple_transcription*dna_part_P_Inv1_forward_part_UTR1_forward_part_Inv2_forward_part_t16_forward_;
  r63: 4 protein_Inv1_degtagged + dna_part_P_Inv1_forward_part_UTR1_forward_part_Inv2_forward_part_t16_forward_ => ordered_polymer_complex_part_P_Inv1_protein_Inv1_degtagged_4x_forward__part_UTR1_forward_part_Inv2_forward_part_t16_forward_; kb__one_step_cooperative_binding*protein_Inv1_degtagged^4*dna_part_P_Inv1_forward_part_UTR1_forward_part_Inv2_forward_part_t16_forward_;
  r63rev: ordered_polymer_complex_part_P_Inv1_protein_Inv1_degtagged_4x_forward__part_UTR1_forward_part_Inv2_forward_part_t16_forward_ => 4 protein_Inv1_degtagged + dna_part_P_Inv1_forward_part_UTR1_forward_part_Inv2_forward_part_t16_forward_; ku__one_step_cooperative_binding*ordered_polymer_complex_part_P_Inv1_protein_Inv1_degtagged_4x_forward__part_UTR1_forward_part_Inv2_forward_part_t16_forward_;
  r64: ordered_polymer_complex_part_P_Inv1_protein_Inv1_degtagged_4x_forward__part_UTR1_forward_part_Inv2_forward_part_t16_forward_ => ordered_polymer_complex_part_P_Inv1_protein_Inv1_degtagged_4x_forward__part_UTR1_forward_part_Inv2_forward_part_t16_forward_ + rna_part_UTR1_forward_part_Inv2_forward_part_t16_forward_; ktx__simple_transcription*ordered_polymer_complex_part_P_Inv1_protein_Inv1_degtagged_4x_forward__part_UTR1_forward_part_Inv2_forward_part_t16_forward_;
  r65: rna_part_P_BetI_forward_part_UTR1_forward_part_PhlF_forward_part_t16_forward_ => rna_part_P_BetI_forward_part_UTR1_forward_part_PhlF_forward_part_t16_forward_ + protein_PhlF_degtagged; ktl__*rna_part_P_BetI_forward_part_UTR1_forward_part_PhlF_forward_part_t16_forward_;
  r66: rna_part_UTR1_forward_part_PhlF_forward_part_t16_forward_ => rna_part_UTR1_forward_part_PhlF_forward_part_t16_forward_ + protein_PhlF_degtagged; ktl__*rna_part_UTR1_forward_part_PhlF_forward_part_t16_forward_;
  r67: rna_part_P_Tet_forward_part_UTR1_forward_part_SrpR_forward_part_t16_forward_ => rna_part_P_Tet_forward_part_UTR1_forward_part_SrpR_forward_part_t16_forward_ + protein_SrpR_degtagged; ktl__*rna_part_P_Tet_forward_part_UTR1_forward_part_SrpR_forward_part_t16_forward_;
  r68: rna_part_UTR1_forward_part_SrpR_forward_part_t16_forward_ => rna_part_UTR1_forward_part_SrpR_forward_part_t16_forward_ + protein_SrpR_degtagged; ktl__*rna_part_UTR1_forward_part_SrpR_forward_part_t16_forward_;
  r69: rna_part_P_AmeR_forward_part_UTR1_forward_part_BetI_forward_part_t16_forward_ => rna_part_P_AmeR_forward_part_UTR1_forward_part_BetI_forward_part_t16_forward_ + protein_BetI_degtagged; ktl__*rna_part_P_AmeR_forward_part_UTR1_forward_part_BetI_forward_part_t16_forward_;
  r70: rna_part_UTR1_forward_part_BetI_forward_part_t16_forward_ => rna_part_UTR1_forward_part_BetI_forward_part_t16_forward_ + protein_BetI_degtagged; ktl__*rna_part_UTR1_forward_part_BetI_forward_part_t16_forward_;
  r71: rna_part_UTR1_forward_part_AmeR_forward_part_t16_forward_ => rna_part_UTR1_forward_part_AmeR_forward_part_t16_forward_ + protein_AmeR_degtagged; ktl__*rna_part_UTR1_forward_part_AmeR_forward_part_t16_forward_;
  r72: rna_part_UTR1_forward_part_HlyIIR_forward_part_t16_forward_ => rna_part_UTR1_forward_part_HlyIIR_forward_part_t16_forward_ + protein_HlyIIR_degtagged; ktl__*rna_part_UTR1_forward_part_HlyIIR_forward_part_t16_forward_;
  r73: rna_part_UTR1_forward_part_AmtR_forward_part_t16_forward_ => rna_part_UTR1_forward_part_AmtR_forward_part_t16_forward_ + protein_AmtR_degtagged; ktl__*rna_part_UTR1_forward_part_AmtR_forward_part_t16_forward_;
  r74: rna_part_P_Inv2_forward_part_UTR1_forward_part_YFP_forward_part_t16_forward_ => rna_part_P_Inv2_forward_part_UTR1_forward_part_YFP_forward_part_t16_forward_ + protein_YFP_degtagged; ktl__*rna_part_P_Inv2_forward_part_UTR1_forward_part_YFP_forward_part_t16_forward_;
  r75: rna_part_UTR1_forward_part_YFP_forward_part_t16_forward_ => rna_part_UTR1_forward_part_YFP_forward_part_t16_forward_ + protein_YFP_degtagged; ktl__*rna_part_UTR1_forward_part_YFP_forward_part_t16_forward_;
  r76: rna_part_UTR1_forward_part_Inv1_forward_part_t16_forward_ => rna_part_UTR1_forward_part_Inv1_forward_part_t16_forward_ + protein_Inv1_degtagged; ktl__*rna_part_UTR1_forward_part_Inv1_forward_part_t16_forward_;
  r77: rna_part_UTR1_forward_part_Inv2_forward_part_t16_forward_ => rna_part_UTR1_forward_part_Inv2_forward_part_t16_forward_ + protein_Inv2_degtagged; ktl__*rna_part_UTR1_forward_part_Inv2_forward_part_t16_forward_;
  r78: protein_PhlF_degtagged => ; kdil__*protein_PhlF_degtagged;
  r79: protein_SrpR_degtagged => ; kdil__*protein_SrpR_degtagged;
  r80: protein_BetI_degtagged => ; kdil__*protein_BetI_degtagged;
  r81: protein_AmeR_degtagged => ; kdil__*protein_AmeR_degtagged;
  r82: protein_HlyIIR_degtagged => ; kdil__*protein_HlyIIR_degtagged;
  r83: protein_AmtR_degtagged => ; kdil__*protein_AmtR_degtagged;
  r84: protein_YFP_degtagged => ; kdil__*protein_YFP_degtagged;
  r85: protein_Inv1_degtagged => ; kdil__*protein_Inv1_degtagged;
  r86: protein_Inv2_degtagged => ; kdil__*protein_Inv2_degtagged;
  r87: rna_part_UTR1_forward_part_PhlF_forward_part_t16_forward_ => ; kdil__*rna_part_UTR1_forward_part_PhlF_forward_part_t16_forward_;
  r88: rna_part_P_BetI_forward_part_UTR1_forward_part_PhlF_forward_part_t16_forward_ => ; kdil__*rna_part_P_BetI_forward_part_UTR1_forward_part_PhlF_forward_part_t16_forward_;
  r89: rna_part_UTR1_forward_part_SrpR_forward_part_t16_forward_ => ; kdil__*rna_part_UTR1_forward_part_SrpR_forward_part_t16_forward_;
  r90: rna_part_P_Tet_forward_part_UTR1_forward_part_SrpR_forward_part_t16_forward_ => ; kdil__*rna_part_P_Tet_forward_part_UTR1_forward_part_SrpR_forward_part_t16_forward_;
  r91: rna_part_UTR1_forward_part_BetI_forward_part_t16_forward_ => ; kdil__*rna_part_UTR1_forward_part_BetI_forward_part_t16_forward_;
  r92: rna_part_P_AmeR_forward_part_UTR1_forward_part_BetI_forward_part_t16_forward_ => ; kdil__*rna_part_P_AmeR_forward_part_UTR1_forward_part_BetI_forward_part_t16_forward_;
  r93: rna_part_UTR1_forward_part_AmeR_forward_part_t16_forward_ => ; kdil__*rna_part_UTR1_forward_part_AmeR_forward_part_t16_forward_;
  r94: rna_part_UTR1_forward_part_HlyIIR_forward_part_t16_forward_ => ; kdil__*rna_part_UTR1_forward_part_HlyIIR_forward_part_t16_forward_;
  r95: rna_part_UTR1_forward_part_AmtR_forward_part_t16_forward_ => ; kdil__*rna_part_UTR1_forward_part_AmtR_forward_part_t16_forward_;
  r96: rna_part_UTR1_forward_part_YFP_forward_part_t16_forward_ => ; kdil__*rna_part_UTR1_forward_part_YFP_forward_part_t16_forward_;
  r97: rna_part_P_Inv2_forward_part_UTR1_forward_part_YFP_forward_part_t16_forward_ => ; kdil__*rna_part_P_Inv2_forward_part_UTR1_forward_part_YFP_forward_part_t16_forward_;
  r98: rna_part_UTR1_forward_part_Inv1_forward_part_t16_forward_ => ; kdil__*rna_part_UTR1_forward_part_Inv1_forward_part_t16_forward_;
  r99: rna_part_UTR1_forward_part_Inv2_forward_part_t16_forward_ => ; kdil__*rna_part_UTR1_forward_part_Inv2_forward_part_t16_forward_;

  // Unit definitions:
  unit square_metre = metre^2;
end
