// SBML level 3 version 2

model biocrnpyler_741640()
  // model units - substance: mole, time: second, volume: litre, area: square_metre, length: metre, extent: mole

  // Compartments:
  compartment default = 1e-6;

  // Species:
  species dna_SrpR_assembly in default = 0;
  species protein_RNAP in default = 3;
  species rna_SrpR_assembly in default = 0;
  species complex_dna_SrpR_assembly_protein_RNAP_ in default = 0;
  species LacI in default = 0;
  species complex_LacI_2x_dna_SrpR_assembly_ in default = 0;
  species complex_complex_LacI_2x_dna_SrpR_assembly__protein_RNAP_ in default = 0;
  species TetR in default = 0;
  species complex_TetR_2x_dna_SrpR_assembly_ in default = 0;
  species complex_complex_TetR_2x_dna_SrpR_assembly__protein_RNAP_ in default = 0;
  species protein_Ribo in default = 24;
  species SrpR in default = 0;
  species complex_protein_Ribo_rna_SrpR_assembly_ in default = 0;
  species IPTG in default = 0;
  species complex_IPTG_2x_LacI_2x_ in default = 0;
  species aTc in default = 0;
  species complex_TetR_2x_aTc_2x_ in default = 0;
  species protein_RNAase in default = 6;
  species complex_protein_RNAase_rna_SrpR_assembly_ in default = 0;
  species complex_complex_protein_Ribo_rna_SrpR_assembly__protein_RNAase_ in default = 0;

  // Parameters:
  kb_P_Tac_Tet_leak_transcription = 2;
  ku_P_Tac_Tet_leak_transcription = 10;
  ktx_P_Tac_Tet_leak_transcription = 1;
  kb__ = 100;
  ku__ = 10;
  kb_P_Tac_Tet_LacI_transcription = 1;
  ku_P_Tac_Tet_LacI_transcription = 100;
  ktx_P_Tac_Tet_LacI_transcription = 1;
  kb_P_Tac_Tet_TetR_transcription = 1;
  ku_P_Tac_Tet_TetR_transcription = 100;
  ktx_P_Tac_Tet_TetR_transcription = 1;
  ku_strong_ = 0.5;
  ktl__ = 0.05;
  kdeg__rna_degredation_mm = 0.001;

  // Reactions:
  r0: dna_SrpR_assembly + protein_RNAP => complex_dna_SrpR_assembly_protein_RNAP_; kb_P_Tac_Tet_leak_transcription*dna_SrpR_assembly*protein_RNAP;
  r0rev: complex_dna_SrpR_assembly_protein_RNAP_ => dna_SrpR_assembly + protein_RNAP; ku_P_Tac_Tet_leak_transcription*complex_dna_SrpR_assembly_protein_RNAP_;
  r1: complex_dna_SrpR_assembly_protein_RNAP_ => dna_SrpR_assembly + rna_SrpR_assembly + protein_RNAP; ktx_P_Tac_Tet_leak_transcription*complex_dna_SrpR_assembly_protein_RNAP_;
  r2: 2 LacI + dna_SrpR_assembly => complex_LacI_2x_dna_SrpR_assembly_; kb__*LacI^2*dna_SrpR_assembly;
  r2rev: complex_LacI_2x_dna_SrpR_assembly_ => 2 LacI + dna_SrpR_assembly; ku__*complex_LacI_2x_dna_SrpR_assembly_;
  r3: complex_LacI_2x_dna_SrpR_assembly_ + protein_RNAP => complex_complex_LacI_2x_dna_SrpR_assembly__protein_RNAP_; kb_P_Tac_Tet_LacI_transcription*complex_LacI_2x_dna_SrpR_assembly_*protein_RNAP;
  r3rev: complex_complex_LacI_2x_dna_SrpR_assembly__protein_RNAP_ => complex_LacI_2x_dna_SrpR_assembly_ + protein_RNAP; ku_P_Tac_Tet_LacI_transcription*complex_complex_LacI_2x_dna_SrpR_assembly__protein_RNAP_;
  r4: complex_complex_LacI_2x_dna_SrpR_assembly__protein_RNAP_ => complex_LacI_2x_dna_SrpR_assembly_ + rna_SrpR_assembly + protein_RNAP; ktx_P_Tac_Tet_LacI_transcription*complex_complex_LacI_2x_dna_SrpR_assembly__protein_RNAP_;
  r5: 2 TetR + dna_SrpR_assembly => complex_TetR_2x_dna_SrpR_assembly_; kb__*TetR^2*dna_SrpR_assembly;
  r5rev: complex_TetR_2x_dna_SrpR_assembly_ => 2 TetR + dna_SrpR_assembly; ku__*complex_TetR_2x_dna_SrpR_assembly_;
  r6: complex_TetR_2x_dna_SrpR_assembly_ + protein_RNAP => complex_complex_TetR_2x_dna_SrpR_assembly__protein_RNAP_; kb_P_Tac_Tet_TetR_transcription*complex_TetR_2x_dna_SrpR_assembly_*protein_RNAP;
  r6rev: complex_complex_TetR_2x_dna_SrpR_assembly__protein_RNAP_ => complex_TetR_2x_dna_SrpR_assembly_ + protein_RNAP; ku_P_Tac_Tet_TetR_transcription*complex_complex_TetR_2x_dna_SrpR_assembly__protein_RNAP_;
  r7: complex_complex_TetR_2x_dna_SrpR_assembly__protein_RNAP_ => complex_TetR_2x_dna_SrpR_assembly_ + rna_SrpR_assembly + protein_RNAP; ktx_P_Tac_Tet_TetR_transcription*complex_complex_TetR_2x_dna_SrpR_assembly__protein_RNAP_;
  r8: rna_SrpR_assembly + protein_Ribo => complex_protein_Ribo_rna_SrpR_assembly_; kb__*rna_SrpR_assembly*protein_Ribo;
  r8rev: complex_protein_Ribo_rna_SrpR_assembly_ => rna_SrpR_assembly + protein_Ribo; ku_strong_*complex_protein_Ribo_rna_SrpR_assembly_;
  r9: complex_protein_Ribo_rna_SrpR_assembly_ => rna_SrpR_assembly + SrpR + protein_Ribo; ktl__*complex_protein_Ribo_rna_SrpR_assembly_;
  r10: 2 IPTG + 2 LacI => complex_IPTG_2x_LacI_2x_; kb__*IPTG^2*LacI^2;
  r10rev: complex_IPTG_2x_LacI_2x_ => 2 IPTG + 2 LacI; ku__*complex_IPTG_2x_LacI_2x_;
  r11: 2 aTc + 2 TetR => complex_TetR_2x_aTc_2x_; kb__*aTc^2*TetR^2;
  r11rev: complex_TetR_2x_aTc_2x_ => 2 aTc + 2 TetR; ku__*complex_TetR_2x_aTc_2x_;
  r12: rna_SrpR_assembly + protein_RNAase => complex_protein_RNAase_rna_SrpR_assembly_; kb__*rna_SrpR_assembly*protein_RNAase;
  r12rev: complex_protein_RNAase_rna_SrpR_assembly_ => rna_SrpR_assembly + protein_RNAase; ku__*complex_protein_RNAase_rna_SrpR_assembly_;
  r13: complex_protein_RNAase_rna_SrpR_assembly_ => protein_RNAase; kdeg__rna_degredation_mm*complex_protein_RNAase_rna_SrpR_assembly_;
  r14: complex_protein_Ribo_rna_SrpR_assembly_ + protein_RNAase => complex_complex_protein_Ribo_rna_SrpR_assembly__protein_RNAase_; kb__*complex_protein_Ribo_rna_SrpR_assembly_*protein_RNAase;
  r14rev: complex_complex_protein_Ribo_rna_SrpR_assembly__protein_RNAase_ => complex_protein_Ribo_rna_SrpR_assembly_ + protein_RNAase; ku__*complex_complex_protein_Ribo_rna_SrpR_assembly__protein_RNAase_;
  r15: complex_complex_protein_Ribo_rna_SrpR_assembly__protein_RNAase_ => protein_Ribo + protein_RNAase; kdeg__rna_degredation_mm*complex_complex_protein_Ribo_rna_SrpR_assembly__protein_RNAase_;

  // Unit definitions:
  unit square_metre = metre^2;
end
